// COMSOL Multiphysics 5.3.1.275 model "2electrode_1ground_SR_Frontiers_smaller.mph"
// Outline of the model tree

Parameters
  a_nsta = 0.058
  b_nsta = 0.125
  a_msta = 0.224
  b_msta = 4
  a_hsta = 0.07
  b_hsta = 0.047

Functions
  int1: Interpolation
    table = 
      {0, 0}
      {0.0001, 0}
      {0.00010001, 0.1}
      {0.000200, 0.1}
      {0.000200001, -0.1}
      {0.0003, -0.1}
      {0.00030001, 0}
      {0.0004000, 0}
    fununit = V
  an1: Analytic | expr = int1(t); args = t; fununit = V

Probes
  pdom1: DomainPoint "Prb1_V" | coords = {28.5, 39.5, 1}
    ppb1: PointExpr "Point Probe Expression 1" | expr = V; unit = V; descr = Electric potential; table = tbl1
  pdom2: DomainPoint "Prb2_V" | coords = {46, 39.5, 1}
    ppb2: PointExpr "Point Probe Expression 1" | expr = V; unit = V; descr = Electric potential; table = tbl1
  pdom3: DomainPoint "Prb1_E" | coords = {28.5, 39.5, 1}
    ppb3: PointExpr "Point Probe Expression 1" | expr = ec.normE; unit = V/m; descr = Electric field norm; table = tbl1
  pdom4: DomainPoint "Prb2_E" | coords = {46, 39.5, 1}
    ppb4: PointExpr "Point Probe Expression 1" | expr = ec.normE; unit = V/m; descr = Electric field norm; table = tbl1

Geometry
  geom1 "Geometry 1" (3D, length unit µm)
    wp1: WorkPlane | selplaneshow = on; unite = on; workplane3d = on
      r1: Rectangle "Electrode 1" | size = {5, 9}
      r2: Rectangle "Electrode 2" | pos = {17.5, 0}; size = {5, 9}
      r3: Rectangle "Electrode 3" | pos = {35, 0}; size = {5, 9}
      r4: Rectangle "Electrode 4" | pos = {52.5, 0}; size = {5, 9}
      r5: Rectangle "Electrode 5" | pos = {70, 0}; size = {5, 9}
      r6: Rectangle "Electrode 6" | pos = {87.5, 0}; size = {5, 9}
      r7: Rectangle "Electrode 7" | pos = {87.5, 17.5}; size = {5, 9}
      r8: Rectangle "Electrode 8" | pos = {0, 17.5}; size = {5, 9}
      r9: Rectangle "Electrode 9" | pos = {17.5, 17.5}; size = {5, 9}
      r10: Rectangle "Electrode 10" | pos = {35, 17.5}; size = {5, 9}
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    blk38: Block "PBS" | pos = {-203.75, -201.75, 0}; size = {500, 500, 100}
    fin: Finalize "Form Union"

Materials
  mat3: Common "Saline" on domains 1
    def "Basic"
      electricconductivity = 0.7
      relpermittivity = 1.2e3
    ElectrolyteConductivity
      sigmal = 0.7
  mat6: Common "Pt - Platinum" on boundaries 3, 8-45
    def "Basic"
      electricconductivity = 8.9e6[S/m]
      thermalexpansioncoefficient = 8.80e-6[1/K]
      heatcapacity = 133[J/(kg*K)]
      density = 21450[kg/m^3]
      thermalconductivity = 71.6[W/(m*K)]
    Enu "Young's modulus and Poisson's ratio"
      youngsmodulus = 168e9[Pa]
      poissonsratio = 0.38

Physics
  ec: ConductiveMedia "Electric Currents" on all domains
    dependent variable V
    cucn1: CurrentConservation (default)
    ein1: ElectricInsulation (default)
    init1: init "Initial Values 1" (default)
    gnd1: Ground on boundaries 6-8, 45
    pot1: ElectricPotential on boundaries 23 | V0 = an1(t[1/s])
    pot2: ElectricPotential on boundaries 29 | V0 = 0

Mesh
  mesh1 "Mesh 1" (physics-controlled)
    size: MeshSizeDefault | hauto = 3

Studies
  std1 "Study 1"
    stat: Stationary | disabledphysics = {ec/pot1, ec/pot2}
    time: Transient "Time Dependent"
      tunit = µs
      tlist = range(0,2,98) range(98.1,0.1,101.9) range(102,2,400)
      useinitsol = on

Solver configurations
  sol1 "Solution 1" (study std1)
    v1: Variables "Dependent Variables 1"
    s1: Stationary "Stationary Solver 1"
      fc1: FullyCoupled | linsolver = i1
      i1: Iterative | linsolver = cg
        mg1: Multigrid | prefun = amg
    su1: StoreSolution
    v2: Variables "Dependent Variables 2" | initmethod = sol; notsolmethod = sol
    t1: Time "Time-Dependent Solver 1" | tlist = range(0,2,98) range(98.1,0.1,101.9) range(102,2,400)
      fc1: FullyCoupled | linsolver = i1
      i1: Iterative | linsolver = cg
        mg1: Multigrid | prefun = amg

Datasets
  dset1: Solution | solution = sol1
  dset2: Solution "Probe Solution 2" | solution = sol1
  cpt1: CutPoint3D "Prb1_V" | data = dset2; pointx = 28.5; pointy = 39.5; pointz = 1
  cpt2: CutPoint3D "Prb2_V" | data = dset2; pointx = 46; pointy = 39.5; pointz = 1
  cpt3: CutPoint3D "Prb1_E" | data = dset2; pointx = 28.5; pointy = 39.5; pointz = 1
  cpt4: CutPoint3D "Prb2_E" | data = dset2; pointx = 46; pointy = 39.5; pointz = 1

Derived values
  pev1: EvalPoint "Point Probe Expression 1" | data = cpt1; table = tbl1; expr = V
  pev2: EvalPoint "Point Probe Expression 1.1" | data = cpt2; table = tbl1; expr = V
  pev3: EvalPoint "Point Probe Expression 1.2" | data = cpt3; table = tbl1; expr = ec.normE
  pev4: EvalPoint "Point Probe Expression 1.3" | data = cpt4; table = tbl1; expr = ec.normE

Tables
  tbl1: Table "Probe Table 1"
    Time (µs) | Electric potential (V), Point: (28.5, 39.5, 1) | Electric potential (V), Point: (46, 39.5, 1) | Electric field norm (V/m), Point: (28.5, 39.5, 1) | Electric field norm (V/m), Point: (46, 39.5, 1)
    0 | 0 | 0 | 0 | 0
    0.4 | 0 | 0 | 0 | 0
    0.8 | 0 | 0 | 0 | 0
    1.6 | 0 | 0 | 0 | 0
    3.2 | 0 | 0 | 0 | 0
    6.4 | 0 | 0 | 0 | 0
    12.8 | 0 | 0 | 0 | 0
    25.6 | 0 | 0 | 0 | 0
    51.2 | 0 | 0 | 0 | 0
    91.2 | 0 | 0 | 0 | 0
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
Plots
  pg9: PlotGroup3D "Plottings" | data = dset1
    vol1: Volume "Voltage" | data = dset1; expr = V; unit = V; descr = Electric potential
    vol2: Volume "Electric Field" | data = dset1; expr = ec.normE; unit = V/m; descr = Electric field norm
  pg10: PlotGroup1D "Probe Plot Group 10"
    tblp1: Table "Probe Table Graph 1" | table = tbl1